*Node
      1,   6.61489344,   22.1607037
      2,   13.6148939,   22.1607037
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*Element, type=CPS3, elset=Eall
  1, 168, 167,   1
  2, 167, 166,  28
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** Section: Section-1
*Solid Section, elset=Eall, material=Material-1
1.0,
** MATERIALS
**
*Material, name=Material-1
*Elastic
 2.3e+11,0.
**
** STEP: Step-1
**
*Step, name=Step-1
*Static
1., 1., 1e-05, 1.
**
** BOUNDARY CONDITIONS
**
*Boundary
17, 1, 2, 0.0
18, 1, 2, 0.0
**
** LOADS
**
** Name: Load-1   Type: Pressure
*Dload
14, P2, -1000.e6
35, P2, -1000.e6
53, P2, -1000.e6
59, P2, -1000.e6
61, P2, -1000.e6
62, P2, -1000.e6
63, P2, -1000.e6
64, P2, -1000.e6
65, P2, -1000.e6
66, P2, -1000.e6
67, P2, -1000.e6
68, P2, -1000.e6
69, P2, -1000.e6
74, P2, -1000.e6
76, P2, -1000.e6
78, P2, -1000.e6
79, P2, -1000.e6
80, P2, -1000.e6
81, P2, -1000.e6
82, P2, -1000.e6
83, P2, -1000.e6
110, P2, -1000.e6
118, P2, -1000.e6
162, P2, -1000.e6
164, P2, -1000.e6
169, P2, -1000.e6
173, P2, -1000.e6
190, P2, -1000.e6
**
** OUTPUT REQUESTS
**
*Output, field, variable=PRESELECT
**
*End Step
