*Node
      1,   6.61489344,   22.1607037
      2,   13.6148939,   22.1607037
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*Element, type=CPS3, elset=Eall
  1, 168, 167,   1
  2, 167, 166,  28
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** Section: Section-1
*Solid Section, elset=Eall, material=Material-1
1.0,
** MATERIALS
**
*Material, name=Material-1
*Elastic
 2.3e+11,0.
*density
1000
**
** STEP: Step-1
**
*Step, name=Step-1
*Frequency
5
**
** BOUNDARY CONDITIONS
**
*Boundary
17, 1, 2, 0.0
18, 1, 2, 0.0
**

** OUTPUT REQUESTS
**
*Output, field, variable=PRESELECT
**
*End Step
