*Heading
*Node
      1,  -19.4642849,         -25.
      2,  -16.7857151,         -25.
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*Element, type=CPS4, elset=EAll
   1,  316,  529,  311,    3
   2,  529,  316,    5,  146
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*Solid Section, elset=EAll, material=Material-1
1.0,
*Material, name=Material-1
*Elastic
 1e+06, 0.3
*Step
*Static
1., 1., 1e-05, 1.
*Dload
1, P4, -500.
3, P4, -500.
464, P4, -500.
2, P2, -500.
*Boundary
6, 2, 2, 0.0
7, 2, 2, 0.0
8, 2, 2, 0.0
9, 2, 2, 0.0
10, 2, 2, 0.0
29, 2, 2, 0.0
30, 2, 2, 0.0
31, 2, 2, 0.0
32, 2, 2, 0.0
33, 2, 2, 0.0
317, 2, 2, 0.0
318, 2, 2, 0.0
319, 2, 2, 0.0
320, 2, 2, 0.0
321, 2, 2, 0.0
322, 2, 2, 0.0
358, 2, 2, 0.0
359, 2, 2, 0.0
360, 2, 2, 0.0
361, 2, 2, 0.0
362, 2, 2, 0.0
363, 2, 2, 0.0
33,1,1,0.0
*Cload
105, 1, -5000.
61, 1, 1000.
61, 2, 1000.
*Output, field
*Output, field, variable=PRESELECT
*El Print
s,e
*Node Print
u1,u2
*End Step
